H := 561400  # Высота рабочей орбиты, м
R := 6371000  # Радиус Земли, м
μ := 3.986*10^14  # Гравитационный параметр Земли, м^3/с^2
R_atm := 100000 + R = 6471000  # Радиус атмосферы, м
Trev := 2*π*sqrt((H + R)^3/μ) = 5744.29  # Период обращения на рабочей орбите, с
Uсм := π  # Угол смещения, рад
Rр := R + H = 6932400  # Радиус рабочей орбиты, м
Vр := sqrt(μ/Rр) = 7582.75  # Скорость движения по рабочей орбите, м/с
n := 1509
j := 0 .. n
Rф[j] := R_atm + (Rр - R_atm - 50000)*j/n  # Радиус орбиты фазирования, м
T_lim[j] := 24*60*60  # Ограничение на время маневра, с
Vф[j] := sqrt(μ/Rф[j])  # Скорость на орбите фазирования, м/с
Vппф[j] := sqrt(μ/Rр)*sqrt(2*Rф[j]/(Rр + Rф[j]))  # Скорость в перигее переходной орбиты, м/с
Vапф[j] := sqrt(μ/Rф[j])*sqrt(2*Rр/(Rр + Rф[j]))  # Скорость в апогее переходной орбиты, м/с
ΔV1[j] := Vр - Vппф[j]  # Затраты характеристической скорости в апогее переходной орбиты, м/с
ΔV4[j] := Vапф[j] - Vф[j]  # Затраты характеристической скорости в перигее переходной орбиты, м/с
Vхрр[j] := 2*ΔV1[j] + 2*ΔV4[j]
# Суммарные затраты характеристической скорости на маневр, м/с
VхΣ[j] := Vхрр[j]
ωр := sqrt(μ/Rр^3) = 0.00109381  # Угловая скорость на рабочей орбите, 1/с
ωф[j] := sqrt(μ/Rф[j]^3)  # Угловая скорость на орбите фазирования, 1/с
t14[j] := π*sqrt((Rф[j] + Rр)^3/(8*μ))  # Время перелета с рабочей орбиты на орбиту фазирования, с
t45[j] := (Uсм + 2*ωр*t14[j] - 2*π)/(ωф[j] - ωр)  # Время фазирования КА, с
tΣ[j] := 2*t14[j] + t45[j]  # Суммарное время маневра, с
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opt :=
    z ← 0
    for j ∈ 1 .. n
        z ← j if (VхΣ[j] ≤ VхΣ[z]) and (tΣ[j] ≤ T_lim[0])
    z
opt = 1125
v_impΣ := VхΣ[opt]  # Суммарные оптимальные затраты характеристической скорости на маневр, м/с
tΣ[opt] = 86284.7  # Суммарное время маневра, с
Δva := ΔV1[opt] = 42.8992  # Затраты характеристической скорости в апогее переходной орбиты, м/с
Δvp := ΔV4[opt] = 43.1419  # Затраты характеристической скорости в перигее переходной орбиты, м/с
R_phase := Rф[opt] = 6777710  # Радиус орбиты фазирования, м
Isp := 3450  # Удельный импульс (Ат/НДМГ), м/с
n_acc := 0.03  # Допустимая перегрузка
Mpalo := 500  # Масса КАН без МДУ, кг
k_tank := (0.025 + 0.05)/2 = 0.0375  # Относительная масса СХН
k_eng := (0.75 + 0.85)/2 = 0.8  # Относительная масса двигателя
k_maint := (0.02 + 0.025)/2 = 0.0225  # Относительная масса КОС
k_const := (0.015 + 0.025)/2 = 0.02  # Относительная масса элементов конструкции
k_fuel := (2.9 + 3)/2 = 2.95  # Соотношение компонентов топлива
life_years := 7  # Время функционирования, г
life_days := life_years*365.25 = 2556.75  # Время функционирования, сут
t_switch := t14[opt] = 2824.21  # Время перелета с рабочей орбиты на орбиту фазирования, с
t_phase := t45[opt] = 80636.3  # Время фазирования КА, с
Δv_corr_day := 0.3  # Затраты характеристической скорости на коррекцию, (м/с)/сут
Δv_corr_sec := Δv_corr_day/(24*60*60) = 3.47222e-6  # Затраты характеристической скорости на коррекцию, (м/с)/с
vloss(Δv, a, r) := Δv/(a^2*r^3/(2.125*10^-2*μ*Isp^2*(1 - exp(-(Δv/Isp)))^2) - 1)
# Функция расчета потерь характеристической скорости на протяженном активном участке, м/с
n := 200
j := 0 .. n
n_acc[j] := n_acc
a0_min := 0.03  # Минимальная начальная тяговооруженность, м/с
a0_max := 0.1  # Максимальная начальная тяговооруженность, м/с
a0[j] := a0_min + (a0_max - a0_min)/n*j  # Вектор начальной тяговооруженности, м/с^2
flights := life_years*12/3 = 28  # Количество маневров по изменению трассы за время существования КА
v_losses_sum[j] :=
    result[j] ← 0
    a[j] ← a0[j]
    for flight ∈ 1 .. flights
        loss[j] ← vloss(Δva, a[j], Rр)
        result[j] ← result[j] + loss[j]
        Δv_corr ← Δv_corr_sec*t_switch
        a[j] ← a[j]*exp((Δv_corr + Δva + loss[j])/Isp)
        loss[j] ← vloss(Δvp, a[j], R_phase)
        result[j] ← result[j] + loss[j]
        Δv_corr ← Δv_corr_sec*t_phase
        a[j] ← a[j]*exp((Δv_corr + Δvp + loss[j])/Isp)
        loss[j] ← vloss(Δvp, a[j], R_phase)
        result[j] ← result[j] + loss[j]
        Δv_corr ← Δv_corr_sec*t_switch
        a[j] ← a[j]*exp((Δv_corr + Δvp + loss[j])/Isp)
        loss[j] ← vloss(Δva, a[j], Rр)
        result[j] ← result[j] + loss[j]
        Δv_corr ← Δv_corr_day*3*30.44
        a[j] ← a[j]*exp((Δv_corr + Δva + loss[j])/Isp)
    result[j]  # Программа для расчета суммарных потерь характеристической скорости на протяженных активных участках, м/с
v_losses_sum = [
    78.3715; 76.5636; 74.8176; 73.1308; 71.5005; 69.9243; 68.3996; 66.9244; 65.4965; 64.1138
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]
H = 561400
# Суммарные затраты характеристической скорости на импульсные маневры, м/с
Mpalo = 500
Δv_imp_sum := v_impΣ*flights = 4818.3
Δv_correct_sum := life_days*Δv_corr_day = 767.025  # Суммарные затраты характеристической скорости на коррекцию, м/с
Isp = 3450
H_utilisation := 80000  # Высота орбиты утилизации, м
va_utilisation := sqrt(μ/Rр)*sqrt(2*(R + H_utilisation)/((R + H_utilisation) + Rр)) = 7445.13  # Скорость в апогее орбиты утилизации, м/с
Δv_utilisation := Vр - va_utilisation = 137.624  # Затраты характеристической скорости на маневр увода КА на орбиту утилизации, м/с
Δv_sum[j] := Δv_utilisation + Δv_imp_sum + Δv_correct_sum + v_losses_sum[j]  # Суммарные затраты характеристической скорости, мс
f(M0) := Mpalo - M0 + ((1 + k_tank)*(M0*(1 - e^(-Δv_sum/Isp))) + k_eng*sqrt(a0*M0) + k_maint*(M0 - Mpalo))*(1 + k_const)
M0 := 4000
M0[j] := root(f(M0)[j], M0)  # Определение вектора стартовой массы, кг
Δv_utilisation = 137.624
P[j] := a0[j]*M0[j]  # Тяга, Н
Mf[j] := M0[j]*(1 - e^(-Δv_sum[j]/Isp))  # Масса топлива, кг
n_max[j] := P[j]/((M0[j] - Mf[j])*9.807)  # Максимальная действующая перегрузка
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opt :=
    z ← 0
    for j ∈ 1 .. n
        z ← j if M0[j] < M0[z] and n_max[j] ≤ n_acc[j]
    z
# Определение номера элемента вектора, соответствующего оптимальному значению массы
v_losses_sum[opt] = 22.7585
opt = 73  # Итоговая стартовая масса, кг
M0[opt] = 4212.76
Mf := Mf[opt] = 3416.08  # Итоговая общая масса топлива, кг
Isp = 3450
Mtank := k_tank*Mf = 128.103  # Масса СХН, кг
Meng := k_eng*sqrt(a0[opt]*M0[opt]) = 12.2381  # Масса двигателя, кг
Mmaint := k_maint*(M0[opt] - Mpalo) = 83.5371  # Масса КОС, кг
Mconst := k_const*(Mf + Mtank + Meng + Mmaint) = 72.7992  # Масса элементов конструкции, кг
(Mf + Mtank + Meng + Mmaint + Mconst + Mpalo) - M0[opt] = 0  # Проверка суммы составляющих и стартовой массы
Mox := k_fuel/(1 + k_fuel)*Mf = 2551.25  # Итоговая масса окислителя, кг
Mfu := 1/(1 + k_fuel)*Mf = 864.831  # Итоговая масса горючего, кг
P[opt] = 234.019  # Тяга, Н
dm := P[opt]/Isp = 0.0678315  # Массовый расход, кг/с
t := Mf/dm = 50361.3  # Время работы ДУ, с
IΣ := P[opt]*t = 11785479  # Суммарный импульс тяги, Н*с
a0[opt] = 0.05555  # Оптимальная начальная тяговооруженность, м/с^2
n_max[opt] = 0.0299524  # Максимальная действующая перегрузка
Δv_sum[opt] = 5745.71
v_losses_sum[opt] = 22.7585
# Задача: определить оптимальное значение давления в камере сгорания и соответствующую ему массу двигательной установки.
# Аппроксимация табличных значений температуры в камере сгорания и молярной массы продуктов сгорания
ORIGIN := 1
p0c[1] := 10*10^5
μc[1] := 24.16*10^-3
T0c[1] := 3290
p0c[2] := 50*10^5
μc[2] := 24.39*10^-3
T0c[2] := 3390
p0c[3] := 100*10^5
T0c[3] := 3470
μc[3] := 24.56*10^-3
p0c[4] := 150*10^5
T0c[4] := 3516
μc[4] := 24.67*10^-3
T0c[5] := 3570
p0c[5] := 250*10^5
μc[5] := 24.79*10^-3
Given
T0c[1] == a*p0c[1]^2 + b*p0c[1] + c
T0c[4] == a*p0c[4]^2 + b*p0c[4] + c
T0c[5] == a*p0c[5]^2 + b*p0c[5] + c
mat := Find(a, b, c) → [-47/105000000000000; 2447/105000000; 22870/7]
tempfun(x) := mat[1]*x^2 + mat[2]*x + mat[3]
n := 200
j := 1 .. n
pap[j] := 10*10^5 + (250 - 10)*10^5/(n - 1)*(j - 1)
Tap[j] := tempfun(pap[j])
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Given
μc[1] == a1*p0c[1]^2 + b1*p0c[1] + c1
μc[4] == a1*p0c[4]^2 + b1*p0c[4] + c1
μc[5] == a1*p0c[5]^2 + b1*p0c[5] + c1
mat1 := Find(a1, b1, c1) → [-1.01785714286e-18; 5.27142857143e-11; 0.0241083035714]
μfun(x) := mat1[1]*x^2 + mat1[2]*x + mat1[3]
μap[j] := μfun(pap[j])
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# Топливо
R := 8.314  # Универсальная газовая постоянная, Дж/(моль*К)
Km0 := 3.07  # Стехиометрическое соотношение компонентов
ρ_NO4 := 1440  # Плотность АТ, кг/м^3
ρ_UDMH := 790  # Плотность НДМГ, кг/м^3
τ := (2 + 3)*10^-3/2 = 0.0025  # Время пребывания продуктов сгорания в камере, с
αox := (0.95 + 0.98)/2 = 0.965  # Коэффициент избытка окислителя в камере
k := 1.18  # Показатель адиабаты в камере
IΣ := IΣ = 11785479  # Суммарный импульс тяги, Н*с
P := P[opt] = 232.559  # Тяга, Н
# Турбина | НСПБ
T0z := 1200  # Температура газа на турбине, К
αoxz := 0.053  # Коэффициент избытка окислителя в газогенераторе
Rz := 460  # Газовая постоянная в газогенераторе, Дж/кг*К
kz := 1.27  # Показатель адиабаты в газогенераторе
# Статистические данные
Δp_gg := 12.5*10^5  # Потеря давления на газогенераторе, Па
Δp_pgg := 7.5*10^5  # Потеря давления между насосом и газогенератором, Па
Δp_f := 10^6  # Потеря давления на форсунках, Па
Δp_pf := 20*10^5  # Потеря давления между насосом и форсунками, Па
η_pox := 0.55  # КПД насоса окислителя
η_pfu := 0.55  # КПД насоса горючего
η_t := 0.65  # КПД турбины
kb := 3.5*10^-5  # Коэффициент массы ТНА
ω := 2500  # Угловая скорость вращения, рад/с
φ := 0.97  # Коэффициент потерь удельного импульса
n1 := 50
i := 1 .. n1
γm := 0.645  # Константа в формуле расхода
l_kso := 1.2  # - относительная длина камеры сгорания
pa[i] := 0.02*10^5 + 0.005*10^5*(i - 1)  # Давление на срезе, Па
Km := αox*Km0 = 2.96255  # Реальное соотношение компонентов в камере
Rc[j] := R/μap[j]  # Дж/кг*К - газовая постоянная продуктов сгорания на выходе из камеры сгорания
ε[j, i] := pap[j]/pa[i]  # - степень расширения газа в сопле
Wa[j, i] := sqrt(2*k/(k - 1)*Rc[j]*Tap[j]*(1 - (1/ε[j, i])^((k - 1)/k)))  # м/с - скорость истечения продуктов сгорания из сопла
Fa_geo[j, i] := ε[j, i]^(1/k)*sqrt((k - 1)/(k + 1))*(2/(k + 1))^(1/(k - 1))/sqrt(1 - (1/ε[j, i])^((k - 1)/k))  # - геометрическая степень расширения сопла
Isp_k[j, i] := φ*(Wa[j, i] + (pa[i] - 0)*Fa_geo[j, i]*sqrt(Rc[j]*Tap[j])/(γm*pap[j]))  # м/с - удельный импульс камеры МДУ
dm[j, i] := P/Isp_k[j, i]  # кг/c - массовый расход топлива через камеру
Fkr[j, i] := dm[j, i]*sqrt(Rc[j]*Tap[j])/(γm*pap[j])  # м^2 - площадь критического сечения сопла
Vks[j, i] := τ*dm[j, i]*Rc[j]*Tap[j]/pap[j]  # м^3- объем камеры сгорания
d_ks[j, i] := nthroot(4*Vks[j, i]/(π*l_kso), 3)  # м - диаметр камеры сгорания
lks[j, i] := l_kso*d_ks[j, i]  # м - длина камеры сгорания
Fks[j, i] := π*d_ks[j, i]^2/4  # м^2 - площадь сечения камеры сгорания
l_sg[j, i] := 0.35*d_ks[j, i]  # м - длина смесительной головки камеры сгорания
d_kr[j, i] := sqrt(4*Fkr[j, i]/π)  # м - диаметр критического сечения сопла
Fa[j, i] := Fa_geo[j, i]*Fkr[j, i]  # м^2 - площадь выходного сечения камеры сгорания
da[j, i] := sqrt(4*Fa[j, i]/π)  # м - диаметр выходного сечения камеры сгорания
lsuz[j, i] := 0.9*(d_ks[j, i] - d_kr[j, i])  # м - длина сужающейся части реактивного сопла
lras[j, i] := 1.3*(da[j, i] - d_kr[j, i])  # м - длина расширяющейся части реактивного сопла
l_kam[j, i] := l_sg[j, i] + lks[j, i] + lsuz[j, i] + lras[j, i]  # м - длина камеры двигательной установки
M_kam[j, i] := 0.025*P^0.9*ε[j, i]^0.3/pap[j]^0.3  # кг - масса камеры
dm_f[j, i] := dm[j, i]/(1 + Km)  # расход горючего через камеру, кг/с
dm_ox[j, i] := Km*dm[j, i]/(1 + Km)  # расход окислителя через камеру, кг/с
Kmz := αoxz*Km0  # Соотношение компонентов в газогенераторе
p_inp := 3*10^5  # Давление на входе в насос, Па
p_outp[j] := pap[j] + Δp_f + Δp_pf  # Давление на выхде из насоса, Па
H_pox[j] := (p_outp[j] - p_inp)/ρ_NO4  # Напор насоса окислителя, Дж/кг
H_pfu[j] := (p_outp[j] - p_inp)/ρ_UDMH  # Напор насоса горючего, Дж/кг
p2 := 3*10^5  # Давление генераторного газа на выходе из турбины, Па
pz[j] := p_outp[j] - Δp_pgg - Δp_gg  # Давление газа на входе в турбину, Па
εt[j] := pz[j]/p2  # Степень расширения генераторного газа
# Массовый расход на турбине, кг/с
dmz[j, i] := (dm_ox[j, i]*H_pox[j]/η_pox + dm_f[j, i]*H_pfu[j]/η_pfu)/(kz/(kz - 1)*Rz*T0z*(1 - (1/εt[j])^((kz - 1)/kz))*η_t - Kmz/(1 + Kmz)*H_pox[j]/η_pox - 1/(1 + Kmz)*H_pfu[j]/η_pfu)
dm_fz[j, i] := dmz[j, i]/(1 + Kmz)
dm_oxz[j, i] := Kmz*dmz[j, i]/(1 + Kmz)
dm_pf[j, i] := dm_f[j, i] + dm_fz[j, i]
dm_pox[j, i] := dm_ox[j, i] + dm_oxz[j, i]
Km_eng[j, i] := dm_pox[j, i]/dm_pf[j, i]
Isp[j, i] := Isp_k[j, i]/(1 + dmz[j, i]/dm[j, i])  # Удельный импульс МДУ, м/с
Mt[j] := kb/ω*(ρ_NO4*H_pox[j]^(3/2) + ρ_UDMH*H_pfu[j]^(3/2))  # Масса ТНА, кг
M_prop[j, i] := IΣ/Isp[j, i]  # Масса топлива, кг
M_f[j, i] := M_prop[j, i]/(1 + Km_eng[j, i])  # Масса горючего, кг
M_ox[j, i] := Km_eng[j, i]*M_prop[j, i]/(1 + Km_eng[j, i])  # Масса окислителя, кг
p_tank := 3*10^5  # Давление в баках, Па
M_ftank[j, i] := 1.5*10^-4*p_tank*(M_f[j, i]/ρ_UDMH)  # Масса топливного отсека горючего, кг
M_oxtank[j, i] := 1.5*10^-4*p_tank*(M_ox[j, i]/ρ_NO4)  # Масса топливного отсека окислителя, кг
M_eng[j, i] := M_kam[j, i] + Mt[j] + M_prop[j, i] + M_ftank[j, i] + M_oxtank[j, i]  # Масса ДУ, кг
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optnum :=
    z ← [1; 1]
    for j ∈ 1 .. n
        for i ∈ 1 .. n1
            z ← [j; i] if M_eng[j, i] < M_eng[z[1], z[2]]
    z
optnum = [101; 1]
M_eng[optnum[1], optnum[2]] = 3784.7  # Оптимальная масса ДУ, кг
pap[(optnum[1], optnum[2])] = 13060302  # Оптимальное давление в камере двигателя, Па
M_prop[optnum[1], optnum[2]] = 3593.06  # Общая масса топлива, кг
Isp[optnum[1], optnum[2]] = 3280.07  # Удельный импульс МДУ, м/с
Nox[j, i] := dm_pox[j, i]*H_pox[j]/η_pox
Nox[optnum[1], optnum[2]] = 1032.74  # Мощность насоса окислителя, Вт
Nf[j, i] := dm_pf[j, i]*H_pfu[j]/η_pfu
Nf[optnum[1], optnum[2]] = 689.268  # Мощность насоса горючего, Вт
Nt[j, i] := kz/(kz - 1)*Rz*T0z*(1 - (1/εt[j])^((kz - 1)/kz))*η_t*dmz[j, i]
Nt[optnum[1], optnum[2]] = 1722.01  # Мощность турбины, Вт
P = 232.559  # Тяга МДУ, Н
M_f[optnum[1], optnum[2]] = 963.002  # Масса горючего, кг
M_ox[optnum[1], optnum[2]] = 2630.06  # Масса окислителя, кг
Fkr[optnum[1], optnum[2]] = 8.9078e-6  # м^2 - площадь критического сечения сопла
Vks[optnum[1], optnum[2]] = 1.5604e-5  # м^3- объем камеры сгорания
d_ks[optnum[1], optnum[2]] = 0.0254872  # м - диаметр камеры сгорания
lks[optnum[1], optnum[2]] = 0.0305846  # м - длина камеры сгорания
Fks[optnum[1], optnum[2]] = 0.000510192  # м^2 - площадь сечения камеры сгорания
l_sg[optnum[1], optnum[2]] = 0.00892052  # м - длина смесительной головки камеры сгорания
d_kr[optnum[1], optnum[2]] = 0.00336775  # м - диаметр критического сечения сопла
Fa[optnum[1], optnum[2]] = 0.00315623  # м^2 - площадь выходного сечения камеры сгорания
da[optnum[1], optnum[2]] = 0.0633927
# м - диаметр выходного сечения камеры сгорания
lsuz[optnum[1], optnum[2]] = 0.0199075  # м - длина сужающейся части реактивного сопла
lras[optnum[1], optnum[2]] = 0.0780325  # м - длина расширяющейся части реактивного сопла
l_kam[optnum[1], optnum[2]] = 0.137445  # м - длина камеры двигательной установки
M_kam[optnum[1], optnum[2]] = 0.344755  # кг - масса камеры
