H := 561400  # Высота рабочей орбиты, м
R := 6371000  # Радиус Земли, м
μ := 3.986*10^14  # Гравитационный параметр Земли, м^3/с^2
R_atm := 100000 + R = 6471000  # Радиус атмосферы, м
Trev := 2*π*sqrt((H + R)^3/μ) = 5744.29  # Период обращения на рабочей орбите, с
Uсм := π  # Угол смещения, рад
Rр := R + H = 6932400  # Радиус рабочей орбиты, м
Vр := sqrt(μ/Rр) = 7582.75  # Скорость движения по рабочей орбите, м/с
n := 1509
j := 0 .. n
Rф[j] := R_atm + (Rр - R_atm - 50000)*j/n  # Радиус орбиты фазирования, м
T_lim[j] := 24*60*60  # Ограничение на время маневра, с
Vф[j] := sqrt(μ/Rф[j])  # Скорость на орбите фазирования, м/с
Vппф[j] := sqrt(μ/Rр)*sqrt(2*Rф[j]/(Rр + Rф[j]))  # Скорость в апогее переходной орбиты, м/с
Vапф[j] := sqrt(μ/Rф[j])*sqrt(2*Rр/(Rр + Rф[j]))  # Скорость в перигее переходной орбиты, м/с
ΔV1[j] := Vр - Vппф[j]  # Затраты характеристической скорости в апогее переходной орбиты, м/с
ΔV4[j] := Vапф[j] - Vф[j]  # Затраты характеристической скорости в перигее переходной орбиты, м/с
Vхрр[j] := 2*ΔV1[j] + 2*ΔV4[j]
# Суммарные затраты характеристической скорости на маневр, м/с
VхΣ[j] := Vхрр[j]
ωр := sqrt(μ/Rр^3) = 0.00109381  # Угловая скорость на рабочей орбите, 1/с
ωф[j] := sqrt(μ/Rф[j]^3)  # Угловая скорость на орбите фазирования, 1/с
t14[j] := π*sqrt((Rф[j] + Rр)^3/(8*μ))  # Время перелета с рабочей орбиты на орбиту фазирования, с
t45[j] := (Uсм + 2*ωр*t14[j] - 2*π)/(ωф[j] - ωр)  # Время фазирования КА, с
tΣ[j] := 2*t14[j] + t45[j]  # Суммарное время маневра, с
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opt :=
    z ← 0
    for j ∈ 1 .. n
        z ← j if (VхΣ[j] ≤ VхΣ[z]) and (tΣ[j] ≤ T_lim[0])
    z
opt = 1125
v_impΣ := VхΣ[opt]  # Суммарные оптимальные затраты характеристической скорости на маневр, м/с
tΣ[opt] = 86284.7  # Суммарное время маневра, с
Δva := ΔV1[opt] = 42.8992  # Затраты характеристической скорости в апогее переходной орбиты, м/с
Δvp := ΔV4[opt] = 43.1419  # Затраты характеристической скорости в перигее переходной орбиты, м/с
R_phase := Rф[opt] = 6777710  # Радиус орбиты фазирования, м
Isp := 3450  # Удельный импульс (Ат/НДМГ), м/с
n_acc := 0.03  # Допустимая перегрузка
Mpalo := 500  # Масса КАН без МДУ, кг
k_tank := (0.025 + 0.05)/2 = 0.0375  # Относительная масса СХН
k_eng := (0.75 + 0.85)/2 = 0.8  # Относительная масса двигателя
k_maint := (0.02 + 0.025)/2 = 0.0225  # Относительная масса КОС
k_const := (0.015 + 0.025)/2 = 0.02  # Относительная масса элементов конструкции
k_fuel := (2.9 + 3)/2 = 2.95  # Соотношение компонентов топлива
life_years := 7  # Время функционирования, г
life_days := life_years*365.25 = 2556.75  # Время функционирования, сут
t_switch := t14[opt] = 2824.21  # Время перелета с рабочей орбиты на орбиту фазирования, с
t_phase := t45[opt] = 80636.3  # Время фазирования КА, с
Δv_corr_day := 0.3  # Затраты характеристической скорости на коррекцию, (м/с)/сут
Δv_corr_sec := Δv_corr_day/(24*60*60) = 3.47222e-6  # Затраты характеристической скорости на коррекцию, (м/с)/с
vloss(Δv, a, r) := Δv/(a^2*r^3/(2.125*10^-2*μ*Isp^2*(1 - exp(-(Δv/Isp)))^2) - 1)
# Функция расчета потерь характеристической скорости на протяженном активном участке, м/с
n := 200
j := 0 .. n
n_acc[j] := n_acc
a0_min := 0.03  # Минимальная начальная тяговооруженность, м/с
a0_max := 0.1  # Максимальная начальная тяговооруженность, м/с
a0[j] := a0_min + (a0_max - a0_min)/n*j  # Вектор начальной тяговооруженности, м/с^2
flights := life_years*12/3 = 28  # Количество маневров по изменению трассы за время существования КА
v_losses_sum[j] :=
    result[j] ← 0
    a[j] ← a0[j]
    for flight ∈ 1 .. flights
        loss[j] ← vloss(Δva, a[j], Rр)
        result[j] ← result[j] + loss[j]
        Δv_corr ← Δv_corr_sec*t_switch
        a[j] ← a[j]*exp((Δv_corr + Δva + loss[j])/Isp)
        loss[j] ← vloss(Δvp, a[j], R_phase)
        result[j] ← result[j] + loss[j]
        Δv_corr ← Δv_corr_sec*t_phase
        a[j] ← a[j]*exp((Δv_corr + Δvp + loss[j])/Isp)
        loss[j] ← vloss(Δvp, a[j], R_phase)
        result[j] ← result[j] + loss[j]
        Δv_corr ← Δv_corr_sec*t_switch
        a[j] ← a[j]*exp((Δv_corr + Δvp + loss[j])/Isp)
        loss[j] ← vloss(Δva, a[j], Rр)
        result[j] ← result[j] + loss[j]
        Δv_corr ← Δv_corr_day*3*30.44
        a[j] ← a[j]*exp((Δv_corr + Δva + loss[j])/Isp)
    result[j]  # Программа для расчета суммарных потерь характеристической скорости на протяженных активных участках, м/с
v_losses_sum = [
    78.3715; 76.5636; 74.8176; 73.1308; 71.5005; 69.9243; 68.3996; 66.9244; 65.4965; 64.1138
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]
H = 561400
# Суммарные затраты характеристической скорости на импульсные маневры, м/с
Mpalo = 500
Δv_imp_sum := v_impΣ*flights = 4818.3
Δv_correct_sum := life_days*Δv_corr_day = 767.025  # Суммарные затраты характеристической скорости на коррекцию, м/с
Isp = 3450
H_utilisation := 80000  # Высота орбиты утилизации, м
va_utilisation := sqrt(μ/(R + H))*sqrt(2*(R + H_utilisation)/((R + H_utilisation) + (R + H))) = 7445.13  # Скорость в апогее орбиты утилизации, м/с
Δv_utilisation := Vр - va_utilisation = 137.624  # Затраты характеристической скорости на маневр увода КА на орбиту утилизации, м/с
Δv_sum[j] := Δv_utilisation + Δv_imp_sum + Δv_correct_sum + v_losses_sum[j]  # Суммарные затраты характеристической скорости, мс
f(M0) := Mpalo - M0 + ((1 + k_tank)*(M0*(1 - e^(-Δv_sum/Isp))) + k_eng*sqrt(a0*M0) + k_maint*(M0 - Mpalo))*(1 + k_const)
M0 := 4000
M0[j] := root(f(M0)[j], M0)  # Определение вектора стартовой массы, кг
Δv_utilisation = 137.624
P[j] := a0[j]*M0[j]  # Тяга, Н
Mf[j] := M0[j]*(1 - e^(-Δv_sum[j]/Isp))  # Масса топлива, кг
n_max[j] := P[j]/((M0[j] - Mf[j])*9.807)  # Максимальная действующая перегрузка
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opt :=
    z ← 0
    for j ∈ 1 .. n
        z ← j if M0[j] < M0[z] and n_max[j] ≤ n_acc[j]
    z
# Определение номера элемента вектора, соответствующего оптимальному значению массы
v_losses_sum[opt] = 22.7585
opt = 73  # Итоговая стартовая масса, кг
M0[opt] = 4212.76
Mf := Mf[opt] = 3416.08  # Итоговая общая масса топлива, кг
Isp = 3450
Mtank := k_tank*Mf = 128.103  # Масса СХН, кг
Meng := k_eng*sqrt(a0[opt]*M0[opt]) = 12.2381  # Масса двигателя, кг
Mmaint := k_maint*(M0[opt] - Mpalo) = 83.5371  # Масса КОС, кг
Mconst := k_const*(Mf + Mtank + Meng + Mmaint) = 72.7992  # Масса элементов конструкции, кг
(Mf + Mtank + Meng + Mmaint + Mconst + Mpalo) - M0[opt] = 0  # Проверка суммы составляющих и стартовой массы
Mox := k_fuel/(1 + k_fuel)*Mf = 2551.25  # Итоговая масса окислителя, кг
Mfu := 1/(1 + k_fuel)*Mf = 864.831  # Итоговая масса горючего, кг
P[opt] = 234.019  # Тяга, Н
dm := P[opt]/Isp = 0.0678315  # Массовый расход, кг/с
t := Mf/dm = 50361.3  # Время работы ДУ, с
IΣ := P[opt]*t = 11785479  # Суммарный импульс тяги, Н*с
a0[opt] = 0.05555  # Оптимальная начальная тяговооруженность, м/с^2
n_max[opt] = 0.0299524  # Максимальная действующая перегрузка
Δv_sum[opt] = 5745.71
