ni := 2 .. 30
N[ni] := ni  # Количество оборотов на орбите фазирования
H := 561400  # Высота рабочей орбиты, м
R := 6371000  # Радиус Земли, м
μ := 3.986*10^14  # Гравитационный параметр Земли, м^3/с^2
T_lim[ni] := 24*60*60  # Ограничение на время маневра, с
a_lim := 0.03  # Ограничение на перегрузку
R_atm := 100000 + R = 6471000  # Радиус атмосферы, м
Trev := 2*π*sqrt((H + R)^3/μ) = 5744.29  # Период обращения на рабочей орбите, с
ω := 0.72921*10^-4  # Угловая скорость вращения Земли, рад/с
Δλrev := ω*Trev = 0.41888  # Межвитковое смещение трассы, рад
nλ := 500
k := 0 .. nλ
Δλ[k] := -Δλrev + k*2*Δλrev/nλ
# Разница между временем нахождения КА на рабочей орбите и временем нахождения на орбите фазирования, обеспечивающая изменение трассы на половину межвиткового смещения, с
2*π*1/Δλrev = 15
Δt[k] := Δλ[k]/ω
T_orb[ni, k] := Trev + Δt[k]/N[ni]  # Период обращения на орбите фазирования, с
T_man[ni, k] := T_orb[ni, k]*N[ni]  # Время маневра на орбите фазирования, с
v := sqrt(μ/(H + R)) = 7582.75  # Скорость движения по рабочей орбите, м/с
get_a_from_T(T) := nthroot(μ*T^2/(4*π^2), 3)  # Функция нахождения большой полуоси по значению пероида обращения
a_orb[ni, k] := get_a_from_T(T_orb[ni, k])  # Большая полуось орбиты фазирования, м
# Радиус точки проведения маневра на орбите фазирования, м
rm_orb := H + R = 6932400
ra_orb[ni, k] := 2*a_orb[ni, k] - rm_orb  # Радиус второй апсиды орбиты фазирования, м
vp_pos[ni, k] := sqrt(μ/rm_orb)*sqrt(2*ra_orb[ni, k]/(ra_orb[ni, k] + rm_orb))  # Скорость в точке проведения маневра на орбите фазирования, м/с
Δv_pos[ni, k] := |(vp_pos[ni, k] - v)|  # Затраты характеристической скорости на один импульс, м/с
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ra_orb[ni, k] =  # no stored result
