# 1. Расчет параметров ПН
# Форма ПН: прямоугольный параллелепипед с габаритами 0,9*0,75*0,75, основание 0,75*0,75
# Масса ПН: 500 кг
a := 0.75
m := 500  # кг
# Высота ПН:
l := 0.9  # м
# Объём ПН:
V := a*a*l = 0.50625  # м^3
# 2. Расчет параметров топливных баков
# Топливо: АТ/НДМГ
# Плотность окислителя:
ρok := 1440  # кг/м^3
# Плотность горючего:
ρr := 790  # кг/м^3
# Массовое соотношение компонентов:
km := 2.762
# Масса топлива:
Mt := 3.886*10^3  # кг
# Масса окислителя:
Mok := 2.843*10^3  # кг
# Масса горючего:
Mr := 1.043*10^3  # кг
# Объём окислителя:
Vok := Mok/ρok = 1.97431  # м^3
# Объём горючего:
Vr := Mr/ρr = 1.32025  # м^3
# Коэффициент газовой подушки:
Krp := 1.1
# Объём бака окислителя:
Vbok := Krp*Vok = 2.17174  # м^3
# Объём бака горючего:
Vbr := Krp*Vr = 1.45228  # м^3
# Форма баков: цилиндрическая с днищами из сферических вставок
# Диаметр бака окислителя:
i := 0 .. 600
Dbok[i] := 1 + i*0.01  # м
# Диаметр бака горючего:
j := 0 .. 600
Dbr[j] := 1 + j*0.01  # м
# Радиусы:
Rbok[i] := Dbok[i]/2  # м
Rbr[j] := Dbr[j]/2  # м
hbok[i] := 0.4*Rbok[i]
hbr[j] := 0.4*Rbr[j]
# Объёмы сферических днищ баков:
Vdok[i] := π*hbok[i]/6*(3*Rbok[i]^2 + hbok[i]^2)
Vdr[j] := π*hbr[j]/6*(3*Rbr[j]^2 + hbr[j]^2)
# Радиусы сферических днищ баков:
Rcfok[i] := (Rbok[i]^2 + hbok[i]^2)/(2*hbok[i])
Rcfr[j] := (Rbr[j]^2 + hbr[j]^2)/(2*hbr[j])
# Объёмы цилиндрических частей баков:
Vcok[i] := Vbok - (2*Vdok[i])
Vcr[j] := Vbr - (2*Vdr[j])
Vcr =  # no stored result
# Длины цилиндрических частей:
Lcok[i] := Vcok[i]/(π*Rbok[i]^2)
Lcr[j] := Vcr[j]/(π*Rbr[j]^2)
# Длины баков:
Lok[i] := Lcok[i] + 2*hbok[i]
Lr[j] := Lcr[j] + 2*hbr[j]
# 3. Данные о камере двигателя из 4ДЗ по ДУ
Lcok =  # no stored result
Lcg := 8.912*10^-3
# Длина смесительной головки:
# Длина КС:
# Длина сужающейся части:
# Длина расширяющейся части:
# Длтина камеры:
# Масса камеры двигателя:
Lkc := 0.031
Lcy := 0.02
Lpac := 0.079
Lkam := 0.138
Mkam := 0.352
Lk := Lcg + Lkc + Lcy + Lpac = 0.138912
# 4.Расчет координат центров масс частей ТКА
# Координаты цм баков можно узнать через их длину:
# Координаты цм частей в базовой СК:
# Бака окислителя:
Xbok[i] := -Lok[i]/2
# Бака горючего:
Xbr[i, j] := -Lok[i] - Lr[j]/2
# Полезной нагрузки:
Xpn := l/2
Xkam[i, j] := -(Lok[i] + Lr[j] + Lcg/2)
# Координаты цм ТКА в базовой СК:
Lr =  # no stored result
# Масса СХН также из 4ДЗ ДУ:
Mcxn := 148.23
Xbck[i, j] := (m*Xpn + (Mok + 0.5*Mcxn)*Xbok[i] + (Mr + 0.5*Mcxn)*Xbr[i, j] + Mkam*Xkam[i, j])/(m + Mok + Mr + Mcxn + Mkam)
# Координаты Y и Z везде равны нулю.
# Координаты центров масс в СК:
# ЦМ Полезной нагрузки:
#
# ЦМ Бака окислителя:
#
# ЦМ Бака горючего:
#
# ЦМ Камеры:
#
# ЦМ ТКА:
Xp[i, j] := Xpn - Xbck[i, j]
Xok[i, j] := Xbok[i] - Xbck[i, j]
Xr[i, j] := Xbr[i, j] - Xbck[i, j]
Xk[i, j] := Xkam[i, j] - Xbck[i, j]
Xcck[i, j] := Xbck[i, j] - Xbck[i, j]
# Координаты по Y и Z равны нулю
# 5. Определение моментов инерции
Xok =  # no stored result
# Приведенные длины баков:
Lprivok[i] := Vbok*4/(π*Dbok[i]^2)
Lprivr[j] := Vbr*4/(π*Dbr[j]^2)
# Моменты инерции ПН: т.к. тело симметрично, то моменты по осям Y и Z будут одинаковы
# Собственные моменты инерции:
Ixx := m/12*2*a^2
Iyy := m/12*(a^2 + l^2)
Izz := Iyy
# Суммарные моменты инерции:
Ix := Ixx
Iy[i, j] := Iyy + m*Xp[i, j]^2
Iz[i, j] := Izz + m*Xp[i, j]^2
IΣpn[i, j] := Ix + Iy[i, j] + Iz[i, j]
# Моменты инерции топливных баков, т.к. осесимметричны, то моменты по осям Y и Z также будут одинаковы
# Собственные моменты инерции:
Ixxr[j] := (Mr + 0.5*Mcxn)/2*Rbr[j]^2
Ixxok[i] := (Mok + 0.5*Mcxn)/2*Rbok[i]^2
Iyyok[i] := (Mok + 0.5*Mcxn)/4*Rbok[i]^2 + (Mok + 0.5*Mcxn)/12*Lprivok[i]^2
Iyyr[j] := (Mr + 0.5*Mcxn)/4*Rbr[j]^2 + (Mr + 0.5*Mcxn)/12*Lprivr[j]^2
Izzok[i] := Iyyok[i]
Izzr[j] := Iyyr[j]
# Суммарные моменты инерции:
Ixok[i] := Ixxok[i]
Iyok[i, j] := Iyyok[i] + (Mok + 0.5*Mcxn)*Xok[i, j]^2
Izok[i, j] := Izzok[i] + (Mok + 0.5*Mcxn)*Xok[i, j]^2
IΣok[i, j] := Ixok[i] + Iyok[i, j] + Izok[i, j]
Iyyok =  # no stored result
Lprivok =  # no stored result
Ixr[j] := Ixxr[j]
Iyr[i, j] := Iyyr[j] + (Mr + 0.5*Mcxn)*Xr[i, j]^2
Izr[i, j] := Izzr[j] + (Mr + 0.5*Mcxn)*Xr[i, j]^2
IΣr[i, j] := Ixr[j] + Iyr[i, j] + Izr[i, j]
# Момент инерции камеры не учитывается, т.к.его сложно рассчитать из-за сложной формы самой камеры и он вносит весьма малый вклад в суммарный момент инерции ТКА.
# Суммарный момент инерции ТКА:
IΣTKA[i, j] := IΣpn[i, j] + IΣok[i, j] + IΣr[i, j]
opt_num := [0, 0]
opt_num :=
    for i ∈ 0 .. 600
        for j ∈ 0 .. 600
            opt_num ← [i, j] if IΣTKA[i, j] < IΣTKA[opt_num[0, 0], opt_num[0, 1]] and (Dbok[i] ≤ 4) and (Dbr[j] ≤ 4) and (Lcr[j] > 0) and (Lcok[i] > 0)
    opt_num
    = [87, 80]
opt_ok := opt_num[0, 0] = 87
opt_g := opt_num[0, 1] = 80
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Dbok[87] = 1.87
# Длина ТКА:
LTKA := Lok[opt_ok] + Lr[opt_g] + l + Lk = 3.09522  # м
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# Вывод
# Момент инерции относительно оси х:
#
# Момент инерции относительно оси у:
#
# Момент инерции относительно оси z:
#
# Проверка:
IΣx := Ix + Ixok[opt_ok] + Ixr[opt_g] = 1774.41
# Суммарный момент ТКА в СК:
#
# Объём бака окислителя:
#
# Объём бака горючего:
#
# Диаметр бака окислителя:
#
# Диаметр бака горючего:
#
# Объём днищ бака окислителя:
#
# Объём днищ бака горючего:
#
# Радиус днищ бака окислителя:
#
# Радиус днищ бака горючего:
#
# Высота днищ бака окислителя:
#
# Высота днищ бака горючего:
#
# Объём цилиндрической части бака окислителя:
#
# Объём цилиндрической части бака горючего:
#
# Длина цилиндрической части бака окислителя:
#
# Длина цилиндрической части бака горючего:
#
# Длина смесительной головки:
#
# Длина КС:
#
# Длина сужающейся части сопла:
#
# Длина расширяющейся части сопла:
#
# Длина камеры:
#
# Диаметр критического сечения сопла:
#
# Диаметр КС:
#
# Диаметр сечения на срезе сопла:
IΣTKA[opt_ok, opt_g] = 7208.87  # кг*м^2
IΣy := Iy[opt_ok, opt_g] + Iyok[opt_ok, opt_g] + Iyr[opt_ok, opt_g] = 2717.23
Vbok = 2.17174  # м^3
IΣz := Iz[opt_ok, opt_g] + Izok[opt_ok, opt_g] + Izr[opt_ok, opt_g] = 2717.23
Vbr = 1.45228  # м^3
IΣx + IΣy + IΣz = 7208.87
Dbok[opt_ok] = 1.87  # м
# Координата ЦМ относительно базовой СК (для комп.схемы):
Xbck[opt_ok, opt_g] = -0.713069
Dbr[opt_g] = 1.8  # м
Vdok[opt_ok] = 0.540979  # м^3
Vdr[237] = 3.16625  # м^3
Rcfok[opt_ok] = 1.35575  # м
Rcfr[opt_g] = 1.305  # м
hbok[opt_ok] = 0.374  # м
hbr[opt_g] = 0.36  # м
IΣTKA =  # no stored result
Vcok[opt_ok] = 1.08978  # м^3
Vcr[opt_g] = 0.487332  # м^3
Lcok[opt_ok] = 0.396794  # м
Lcr[opt_g] = 0.191509  # м
Lcg = 0.008912  # м
Lkc = 0.031  # м
Lcy = 0.02  # м
Lpac = 0.079  # м
Lk := 1.916  # м
Dkp := 0.056  # м
Dkc := 0.218  # м
Da := 1.16  # м
# Координата цм ПН в связанной СК:
#
# Координата цм бака окислителя в связанной СК:
#
# Координата цм бака горючего в связанной СК:
#
# Координата цм камеры в связанной СК:
#
# Координата цм ТКА в связанной СК:
Xp[opt_ok, opt_g] = 1.16307
Xok[opt_ok, opt_g] = 0.140672
Xr[opt_ok, opt_g] = -0.88748
Xk[opt_ok, opt_g] = -1.34769
Xcck[opt_ok, opt_g] = 0
