# Расчет для случая максимальной продольной перегрузки
# Дано
# Габариты бака
D := 1.82*m  # Диаметр бака окислителя
Rc := D/2 = 0.91 m  # Радиус бака окислителя
Rs := 1.3195*m  # Радиус сферического днища
hs := 0.364*m  # Высота днищ бака окислителя
hc := 0.38882843*m  # Высота цилиндрической части бака окислителя
L := 1.11682843*m  # Общая длина бака
Vseg := π*hs^2*(Rs - hs/3) = 0.498735 m^3  # Объем шарового сегмента днища
Vcyl := π*D^2*hc/4 = 1.01156 m^3  # Объем цилиндрической части бака
Vtank := 2*Vseg + Vcyl = 2.00903 m^3  # Общий объем бака
Vlow := Vseg + Vcyl = 1.51029 m^3  # Объем нижнего шарового сегмента и цилиндрической части бака
# Масса ПН
M := 500*kg
# Внутреннее избыточное давление | Объем бака
p := 3*10^5*Pa
# Продольная перегрузка
n := 5
# Свойства окислителя
# Объем
ρ := 1440*kg/m^3  # Плотность
Vox := 1.82638889*m^3
# Коэффициенты безопасности
f := 1.4
fp := 1.3
# Свойства материала
E := 71*10^9*Pa  # Модуль упругости
σ02 := 1.7*10^8*Pa  # Предел текучести
# Расчет цилиндрической части
# Определим высоту столба жидкости в баке
# Так как объем жидкости превышает объем нижнего шарового сегмента двигателя и цилиндрической части, значит зеркало жидкости находится в верхнем шаровом сегменте
Vtop := Vox - Vlow = 0.316096 m^3  # Объем жидкости в верхнем шаровом сегменте
Vair := Vseg - Vtop = 0.182639 m^3  # Объем газовой подушки в баке
Given
Vair == π*htop^2*(Rs - htop/3)
htop := 0.364*m
htop := Find(htop)
htop = 0.215871 m  # Высота столба жидкости в верхнем сегменте
hox := hs + hc + htop = 0.968699 m  # Общая высота столба жидкости
# Определим продольную силу, действующую от полезной нагрузки
N := M*g*n = 24516.6 N
# Определим меридиональные напряжения
σ1pos(δc) := fp*p*Rc/(2*δc) - N/(2*π*Rc*δc)
σ1neg(δc) := p*Rc/(2*δc) - f*N/(2*π*Rc*δc)
# Так как обе эти функции всегда положительны, то меридиональные напряжения равны
σ1 := σ1pos
# Найдем кольцевые напряжения в точке соединения нижнего сферического днища и цилиндрической части, так как там гидростатическое давление, действующее на цилиндр, максимально
h_max_cyl := hc + htop = 0.604699 m  # Расстояние от поверхности жидкости до искомой точки
ptot := p + ρ*g*n*h_max_cyl = 342697 Pa  # Полное давление в искомой точке
σ2(δc) := fp*ptot*Rc/δc
# Так как и меридиональные, и кольцевые напряжения больше нуля, оболочку будем рассчитывать только на прочность
# Для этого должно быть удовлетворено условие σэкв <= σ0,2, где σэкв = max(σ1, σ2)
Given
σ1(δ1) == σ02
δ_array := [0.3; 0.4; 0.5; 0.6; 0.7; 0.8; 0.9; 1; 1.2; 1.5; 1.6; 1.8; 1.9; 2; 2.5; 3; 3.5; 4; 4.5; 5]*mm
σ2(δ2) == σ02
δ1 := 1 mm
δ2 := 1 mm
res := Find(δ1, δ2)
δcyl := max(res) = 2.38476 mm  # Расчетная толщина цилиндра
δfin :=
    for test ∈ δ_array
        break if test > δcyl
    test
δfin = 2.5 mm  # Толщина цилиндра из сортамента
σeq := max(σ1(δfin), σ2(δfin)) = 162163999 Pa  # Итоговое эквивалентное напряжение
η := σ02/σeq = 1.04832  # Итоговый коэффициент запаса прочности
# Расчет сферической части
# Будем проводить расчет только нижнего днища, так как в нем имеют место максимальное давление
ps := p + g*ρ*n*(hox + (Rs - sqrt(Rs^2 - Rc^2))) = 394099 Pa  # Максимальное давление, действующее на днище бака (в полюсе)
σs(δs) := fp*ps*Rs/(2*δs)  # Эквивалентное напряжение в сферическом сегменте
Given
σs(δs_res) == σ02
δs_res := 1 mm
δs_found := Find(δs_res)
δs_found = 0.00198829 m  # Расчетная толщина днища
δs_fin :=
    for test ∈ δ_array
        break if test > δs_found
    test
δs_fin = 0.002 m  # Толщина днища из сортамента
